<?xml version="1.0"?>
<!-- $Id$ -->
<!--
  ZF Navy free balloon flight model for JSBSim.

    Copyright (C) 2006 - 2008  Anders Gidenstam  (anders(at)gidenstam.org)

    This program is free software; you can redistribute it and/or modify
    it under the terms of the GNU General Public License as published by
    the Free Software Foundation; either version 2 of the License, or
    (at your option) any later version.

    This program is distributed in the hope that it will be useful,
    but WITHOUT ANY WARRANTY; without even the implied warranty of
    MERCHANTABILITY or FITNESS FOR A PARTICULAR PURPOSE.  See the
    GNU General Public License for more details.

    You should have received a copy of the GNU General Public License
    along with this program; if not, write to the Free Software
    Foundation, Inc., 59 Temple Place, Suite 330, Boston, MA  02111-1307  USA

-->
<?xml-stylesheet type="text/xsl" href="http://jsbsim.sourceforge.net/JSBSim.xsl"?>
<fdm_config name="ZF_NAVY_FREE_BALLOON" version="2.0" release="ALPHA"
 xmlns:xsi="http://www.w3.org/2001/XMLSchema-instance"
 xsi:noNamespaceSchemaLocation="http://jsbsim.sourceforge.net/JSBSim.xsd">

 <fileheader>

  <description>Free-flying gas balloon of the type ZF Navy free balloon.</description>

  <author>Anders Gidenstam</author>
  <email>anders at gidenstam dot org</email>

  <filecreationdate> 2006-03-24 </filecreationdate>
  <version>$Id$</version>

  <license>
   <licenseName>GPL</licenseName>
   <licenseURL>http://www.gnu.org/licenses/gpl.html</licenseURL>
  </license>
  <note>
   This model was created using publicly available data, publicly available
   technical reports, textbooks, and guesses. It contains no proprietary or
   restricted data. It has been validated only to the extent that it may seem
   to "fly right", and possibly to comply to published, publicly known,
   performance data (maximum speed, endurance, etc.).

   This model is distributed in the hope that it will be useful,
   but WITHOUT ANY WARRANTY; without even the implied warranty of
   MERCHANTABILITY or FITNESS FOR A PARTICULAR PURPOSE.  See the
   GNU General Public License for more details.
  </note>

 </fileheader>

 <!--
 ==== Metrics ===============================================================
 -->
 <metrics>
  <documentation>
   NOTE: The origo of the structural frame coordinate system is in the center
         of the bottom of the basket.
	 x/y/z = back/right/up
  </documentation>

  <wingarea unit="M2"> 120.18 </wingarea> <!--  Must be large to avoid  -->
  <wingspan unit="M">   12.37 </wingspan> <!--  numerical problems.     -->
  <chord unit="FT"> 0 </chord>
  <htailarea unit="FT2"> 0 </htailarea>
  <htailarm unit="FT"> 0 </htailarm>
  <vtailarea unit="FT2"> 0 </vtailarea>
  <vtailarm unit="FT"> 0 </vtailarm>
  <location name="AERORP" unit="M">
   <x> 0 </x>
   <y> 0 </y>
   <z> 15.545 </z>
  </location>
  <location name="EYEPOINT" unit="M">
   <x> 0 </x>
   <y> 0 </y>
   <z> 1.5 </z>
  </location>
  <location name="VRP" unit="M">
   <x> 0 </x>
   <y> 0 </y>
   <z> 6 </z>
  </location>
 </metrics>

 <!--
 ==== Mass balance ==========================================================
 -->
 <mass_balance>

  <documentation>
    Mass distribution according to
    "The Navy's venerable airship Los Angles", W.F. Althoff.

    Envelope     225 lbs.
    Net          101 lbs.
    Basket        97 lbs.
    Load ring     20 lbs.
    Valve         14 lbs.
    Valve cord     4 lbs.
    Drag rope     30 lbs.
    Instruments    7 lbs.
    Com. gear      9 lbs.
  </documentation>
  <documentation>
    Rough model to estimate CG and inertia tensor.

    % Envelope + net (Thin sphere)
    m_e = 147.87  % KG
    r   = 6.185   % M

    % Basket + Drag rope + Instruments + Com. gear (Point mass)
    m_b = 64.864  % KG

    % Load ring (Point mass)
    m_lr = 9.072  % KG

    % Top valve + cord (Point mass)
    m_v = 8.165   % KG

    % CG for envelope: (0, 0, 15.545)
    % Inertia tensor for envelope. Since we take CG_e as CG we are done.
    Ixx = 2/3 * m_e * r^2
    Iyy = 2/3 * m_e * r^2
    Izz = 2/3 * m_e * r^2
    Ixy = Ixz = Iyz = 0
  </documentation>

  <ixx unit="KG*M2"> 3771.1 </ixx>
  <iyy unit="KG*M2"> 3771.1 </iyy>
  <izz unit="KG*M2"> 3771.1 </izz>
  <ixy unit="KG*M2">   -0   </ixy>
  <ixz unit="KG*M2">   -0   </ixz>
  <iyz unit="KG*M2">   -0   </iyz>
  <emptywt unit="KG"> 147.87 </emptywt>
  <location name="CG" unit="M">
   <x>  0     </x>
   <y>  0     </y>
   <z> 15.545 </z>
  </location>

  <pointmass name="Ballast">
   <location unit="M">
    <x> 0.0 </x>
    <y> 0.0 </y>
    <z> 0.0 </z>
   </location>
   <weight unit="KG"> 900.0 </weight>
  </pointmass>

  <pointmass name="Basket">
   <weight unit="KG"> 64.864 </weight>
   <location name="POINTMASS" unit="M">
    <x> 0    </x>
    <y> 0    </y>
    <z> 0.30 </z>
   </location>
  </pointmass>
  <pointmass name="Load ring">
   <weight unit="KG"> 9.072 </weight>
   <location name="POINTMASS" unit="M">
    <x> 0     </x>
    <y> 0     </y>
    <z> 2.340 </z>
   </location>
  </pointmass>
  <pointmass name="Top valve">
   <weight unit="KG"> 8.164 </weight>
   <location name="POINTMASS" unit="M">
    <x>  0    </x>
    <y>  0    </y>
    <z> 21.73 </z>
   </location>
  </pointmass>

  <pointmass name="Pilot">
   <weight unit="KG"> 80 </weight>
   <location name="POINTMASS" unit="M">
    <x> -0.5 </x>
    <y>  0.5 </y>
    <z>  1.0 </z>
   </location>
  </pointmass>

 </mass_balance>

 <!--
 === Gas cell ===============================================================
 -->

 <buoyant_forces>

  <!--External environment properties -->
  <!-- Set from Nasal. -->
  <property> environment/sun-angle-rad </property>
  <property> environment/sun-radiation-norm </property>

  <!-- Gas cell constants -->

  <!-- Conductivity [lb / (K ft sec)] (Guess) -->
  <property value="0.05"> buoyant_forces/heat-coeffs/conductivity </property>
  <!-- Emissivity [0,1] (Guess) -->
  <property value="0.05"> buoyant_forces/heat-coeffs/emissivity </property>

  <!-- This should preferably have been exported by the gas_cell class. -->
  <property value="20.29"> buoyant_forces/gas-cell[0]/max-radius-ft </property>

  <gas_cell type="HYDROGEN">
   <location unit="M">
    <x> 0 </x>
    <y> 0 </y>
    <z> 15.545 </z>
   </location>
   <x_radius unit="M"> 6.185 </x_radius>
   <y_radius unit="M"> 6.185 </y_radius>
   <z_radius unit="M"> 6.185 </z_radius>
   <fullness> 1.0 </fullness>
   <!-- This corresponds to an open appendix. -->
   <max_overpressure unit="PA"> 0.0 </max_overpressure>
   <!-- Manual valve coefficient. This is a wild guess. -->
   <valve_coefficient unit="M4*SEC/KG"> 0.01 </valve_coefficient>

   <!-- heat exchange with the environment. [lb ft / sec] -->
   <heat>
    <function name="buoyant_forces/gas-cell/dU_conduction">
     <product>
      <value> 6282.25 </value> <!-- Surface area [ft2] -->
      <property> buoyant_forces/heat-coeffs/conductivity </property>
      <difference>
       <property> atmosphere/T-R </property>
       <property> buoyant_forces/gas-cell/temp-R </property>
      </difference>
     </product>
    </function>
    <function name="buoyant_forces/gas-cell/dU_radiation">
     <product>
      <value> 0.1714e-8 </value> <!-- Stefan-Boltzmann's constant
                                      [Btu / (h ft^2 R^4)] -->
      <property> buoyant_forces/heat-coeffs/emissivity </property>
      <value>   6282.25 </value> <!-- Surface area [ft2] -->
      <difference>
       <pow>
        <property> atmosphere/T-R </property>
        <value> 4.0 </value>
       </pow>
       <pow>
        <property> buoyant_forces/gas-cell/temp-R </property>
        <value> 4.0 </value>
       </pow>
      </difference>
     </product>
    </function>
    <!-- Heat gain due to solar radiation. Pure guess work. -->
    <function name="buoyant_forces/gas-cell/dU_solar_radiation">
     <product>
      <value>   7.2330 </value> <!-- Conversion to [lb ft / s] -->
      <value>   120.18 </value> <!-- Estimated projected surface area [m2] -->
      <value>  1300.00 </value> <!-- Solar energy flow [W/m2] -->
      <value>     0.03 </value> <!-- Guess -->
      <property> environment/sun-radiation-norm </property>
      <max>
       <value> 0.0 </value>
       <difference>
        <value> 1.5708 </value>
        <property> environment/sun-angle-rad </property>
       </difference>
      </max>
     </product>
    </function>
   </heat>
  </gas_cell>

 </buoyant_forces>

 <!--
 === Ground reactions =======================================================
 -->
 <ground_reactions>

  <contact type="BOGEY" name="BASKET_LOWER_CENTER">
   <location unit="M">
    <x>  0.0  </x>
    <y>  0.0  </y>
    <z> -0.05 </z>
   </location>
   <static_friction> 0.5 </static_friction>
   <dynamic_friction> 0.5 </dynamic_friction>
   <rolling_friction> 1.0 </rolling_friction>
   <spring_coeff unit="N/M"> 25000 </spring_coeff>
   <damping_coeff unit="N/M/SEC"> 5000 </damping_coeff>
   <max_steer unit="DEG"> 0.0 </max_steer>
   <brake_group> NONE </brake_group>
   <retractable>0</retractable>
  </contact>

  <contact type="BOGEY" name="BASKET_LOWER_CORNER_1">
   <location unit="M">
    <x> -0.65 </x>
    <y> -0.65 </y>
    <z>  0.0  </z>
   </location>
   <static_friction> 0.5 </static_friction>
   <dynamic_friction> 0.5 </dynamic_friction>
   <rolling_friction> 1.0 </rolling_friction>
   <spring_coeff unit="N/M"> 25000 </spring_coeff>
   <damping_coeff unit="N/M/SEC"> 5000 </damping_coeff>
   <max_steer unit="DEG"> 0.0 </max_steer>
   <brake_group> NONE </brake_group>
   <retractable>0</retractable>
  </contact>
  <contact type="BOGEY" name="BASKET_LOWER_CORNER_2">
   <location unit="M">
    <x> -0.65 </x>
    <y>  0.65 </y>
    <z>  0.0  </z>
   </location>
   <static_friction> 0.5 </static_friction>
   <dynamic_friction> 0.5 </dynamic_friction>
   <rolling_friction> 1.0 </rolling_friction>
   <spring_coeff unit="N/M"> 25000 </spring_coeff>
   <damping_coeff unit="N/M/SEC"> 5000 </damping_coeff>
   <max_steer unit="DEG"> 0.0 </max_steer>
   <brake_group> NONE </brake_group>
   <retractable>0</retractable>
  </contact>
  <contact type="BOGEY" name="BASKET_LOWER_CORNER_3">
   <location unit="M">
    <x>  0.65 </x>
    <y> -0.65 </y>
    <z>  0.0  </z>
   </location>
   <static_friction> 0.5 </static_friction>
   <dynamic_friction> 0.5 </dynamic_friction>
   <rolling_friction> 1.0 </rolling_friction>
   <spring_coeff unit="N/M"> 25000 </spring_coeff>
   <damping_coeff unit="N/M/SEC"> 5000 </damping_coeff>
   <max_steer unit="DEG"> 0.0 </max_steer>
   <brake_group> NONE </brake_group>
   <retractable>0</retractable>
  </contact>
  <contact type="BOGEY" name="BASKET_LOWER_CORNER_4">
   <location unit="M">
    <x> 0.65 </x>
    <y> 0.65 </y>
    <z> 0.0  </z>
   </location>
   <static_friction> 0.5 </static_friction>
   <dynamic_friction> 0.5 </dynamic_friction>
   <rolling_friction> 1.0 </rolling_friction>
   <spring_coeff unit="N/M"> 25000 </spring_coeff>
   <damping_coeff unit="N/M/SEC"> 5000 </damping_coeff>
   <max_steer unit="DEG"> 0.0 </max_steer>
   <brake_group> NONE </brake_group>
   <retractable>0</retractable>
  </contact>

  <contact type="STRUCTURE" name="BASKET_UPPER_CORNER_1">
   <location unit="M">
    <x> -0.72 </x>
    <y> -0.72 </y>
    <z> 1.08 </z>
   </location>
   <static_friction> 0.5 </static_friction>
   <dynamic_friction> 0.5 </dynamic_friction>
   <rolling_friction> 1.0 </rolling_friction>
   <spring_coeff unit="N/M"> 25000 </spring_coeff>
   <damping_coeff unit="N/M/SEC"> 5000 </damping_coeff>
   <max_steer unit="DEG"> 0.0 </max_steer>
   <brake_group> NONE </brake_group>
   <retractable>0</retractable>
  </contact>
  <contact type="STRUCTURE" name="BASKET_UPPER_CORNER_2">
   <location unit="M">
    <x> -0.72 </x>
    <y> 0.72 </y>
    <z> 1.08 </z>
   </location>
   <static_friction> 0.5 </static_friction>
   <dynamic_friction> 0.5 </dynamic_friction>
   <rolling_friction> 1.0 </rolling_friction>
   <spring_coeff unit="N/M"> 25000 </spring_coeff>
   <damping_coeff unit="N/M/SEC"> 5000 </damping_coeff>
   <max_steer unit="DEG"> 0.0 </max_steer>
   <brake_group> NONE </brake_group>
   <retractable>0</retractable>
  </contact>
  <contact type="STRUCTURE" name="BASKET_UPPER_CORNER_3">
   <location unit="M">
    <x> 0.72 </x>
    <y> -0.72 </y>
    <z> 1.08 </z>
   </location>
   <static_friction> 0.5 </static_friction>
   <dynamic_friction> 0.5 </dynamic_friction>
   <rolling_friction> 1.0 </rolling_friction>
   <spring_coeff unit="N/M"> 25000 </spring_coeff>
   <damping_coeff unit="N/M/SEC"> 5000 </damping_coeff>
   <max_steer unit="DEG"> 0.0 </max_steer>
   <brake_group> NONE </brake_group>
   <retractable>0</retractable>
  </contact>
  <contact type="STRUCTURE" name="BASKET_UPPER_CORNER_4">
   <location unit="M">
    <x> 0.72 </x>
    <y> 0.72 </y>
    <z> 1.08 </z>
   </location>
   <static_friction> 0.5 </static_friction>
   <dynamic_friction> 0.5 </dynamic_friction>
   <rolling_friction> 1.0 </rolling_friction>
   <spring_coeff unit="N/M"> 25000 </spring_coeff>
   <damping_coeff unit="N/M/SEC"> 5000 </damping_coeff>
   <max_steer unit="DEG"> 0.0 </max_steer>
   <brake_group> NONE </brake_group>
   <retractable>0</retractable>
  </contact>

  <contact type="STRUCTURE" name="TOP_OF_ENVELOPE">
   <location unit="M">
    <x>  0    </x>
    <y>  0    </y>
    <z> 21.73 </z>
   </location>
   <static_friction> 0.5 </static_friction>
   <dynamic_friction> 0.5 </dynamic_friction>
   <rolling_friction> 1.0 </rolling_friction>
   <spring_coeff unit="N/M"> 25000 </spring_coeff>
   <damping_coeff unit="N/M/SEC"> 5000 </damping_coeff>
   <max_steer unit="DEG"> 0.0 </max_steer>
   <brake_group> NONE </brake_group>
   <retractable>0</retractable>
  </contact>

 </ground_reactions>

 <propulsion/>

 <!--
 === Flight control system ==================================================
 -->
 <flight_control name="FGFCS">

  <!-- INTERFACE PROPERTIES -->
  <property>fcs/gas-valve-cmd-norm</property>
  <property>fcs/rip-cmd-norm</property>

  <!-- CHANNELS -->
  <channel name="Gas">

   <summer name="Gas Valve Sum">
    <input>fcs/gas-valve-cmd-norm</input>
    <clipto>
     <min>0</min>
     <max>1</max>
    </clipto>
   </summer>

   <fcs_function name="Gas Valve Control">
    <function>
     <sum>
      <property>fcs/gas-valve-sum</property>
      <product>
       <value>5.0</value>
       <property>fcs/rip-cmd-norm</property>
      </product>
     </sum>
    </function>
    <output>buoyant_forces/gas-cell/valve_open</output>
   </fcs_function>
  </channel>

  <channel name="Envelope animation">

   <fcs_function name="fcs/envelope-volume-norm">
    <function>
     <quotient>
      <property> buoyant_forces/gas-cell/volume-ft3 </property>
      <property> buoyant_forces/gas-cell/max_volume-ft3 </property>
     </quotient>
    </function>
   </fcs_function>

   <fcs_function name="fcs/envelope-width-radius-norm">
    <function>
     <max>
      <quotient>
       <product>
        <value> 1.0 </value>
        <pow>
         <product>
          <value> 0.238732414 </value>
          <property> buoyant_forces/gas-cell/volume-ft3 </property>
         </product>
         <value> 0.333333333 </value>
        </pow>
       </product>
       <property> buoyant_forces/gas-cell/max-radius-ft </property>
      </quotient>
      <value> 0.4 </value>
     </max>
    </function>
    <output>/sim/multiplay/generic/float[2]</output>
   </fcs_function>

   <fcs_function name="fcs/envelope-upper-radius-norm">
    <function>
     <min>
      <value> 1.0 </value>
      <product>
       <value> 0.8 </value>
       <property> fcs/envelope-width-radius-norm </property>
      </product>
     </min>
    </function>
    <output>/sim/multiplay/generic/float[1]</output>
   </fcs_function>

   <fcs_function name="fcs/envelope-lower-radius-norm">
    <function>
     <min>
      <value> 1.0 </value>
      <product>
       <value> 1.2 </value>
       <property> fcs/envelope-width-radius-norm </property>
      </product>
     </min>
    </function>
    <output>/sim/multiplay/generic/float[0]</output>
   </fcs_function>

  </channel>

  <channel name="Joystick input">

   <pure_gain name="Aileron wrapper L">
    <input> fcs/aileron-cmd-norm </input>
    <gain> 1 </gain>
    <output> fcs/left-aileron-pos-norm </output>
   </pure_gain>
   <pure_gain name="Aileron wrapper R">
    <input> fcs/aileron-cmd-norm </input>
    <gain> -1 </gain>
    <output> fcs/right-aileron-pos-norm </output>
   </pure_gain>

   <pure_gain name="Elevator wrapper">
    <input> fcs/elevator-cmd-norm </input>
    <gain> 1 </gain>
    <output> fcs/elevator-pos-norm </output>
   </pure_gain>

   <pure_gain name="Rudder wrapper">
    <input> fcs/rudder-cmd-norm </input>
    <gain> 1 </gain>
    <output> fcs/rudder-pos-norm </output>
   </pure_gain>

  </channel>

 </flight_control>

 <!--
 ==== External reactions ====================================================
 -->

 <external_reactions>

  <force name="added-mass-bx" frame="BODY">
   <location unit="M">
    <x>  0.0 </x>
    <y>  0.0 </y>
    <z>  0.0 </z>
   </location>
   <direction>
    <x> 1.0 </x>
    <y> 0.0 </y>
    <z> 0.0 </z>
   </direction>
  </force>
  <force name="added-mass-by" frame="BODY">
   <location unit="M">
    <x>  0.0 </x>
    <y>  0.0 </y>
    <z>  0.0 </z>
   </location>
   <direction>
    <x> 0.0 </x>
    <y> 1.0 </y>
    <z> 0.0 </z>
   </direction>
  </force>
  <force name="added-mass-bz" frame="BODY">
   <location unit="M">
    <x>  0.0 </x>
    <y>  0.0 </y>
    <z>  0.0 </z>
   </location>
   <direction>
    <x> 0.0 </x>
    <y> 0.0 </y>
    <z> 1.0 </z>
   </direction>
  </force>

  <force name="added-mass-pitch[0]" frame="BODY">
   <location unit="M">
    <x>  0.0 </x>
    <y>  0.0 </y>
    <z> -0.3048 </z>
   </location>
   <direction>
    <x> 1.0 </x>
    <y> 0.0 </y>
    <z> 0.0 </z>
   </direction>
  </force>
  <force name="added-mass-pitch[1]" frame="BODY">
   <location unit="M">
    <x>  0.0 </x>
    <y>  0.0 </y>
    <z>  0.3048 </z>
   </location>
   <direction>
    <x> 1.0 </x>
    <y> 0.0 </y>
    <z> 0.0 </z>
   </direction>
  </force>

  <force name="added-mass-yaw[0]" frame="BODY">
   <location unit="M">
    <x>  0.0 </x>
    <y> -0.3048 </y>
    <z>  0.0 </z>
   </location>
   <direction>
    <x> 1.0 </x>
    <y> 0.0 </y>
    <z> 0.0 </z>
   </direction>
  </force>
  <force name="added-mass-yaw[1]" frame="BODY">
   <location unit="M">
    <x>  0.0 </x>
    <y>  0.3048 </y>
    <z>  0.0 </z>
   </location>
   <direction>
    <x> 1.0 </x>
    <y> 0.0 </y>
    <z> 0.0 </z>
   </direction>
  </force>

 </external_reactions>

 <!--
 === Aerodynamics ===========================================================
 -->
 <system name="constants">

  <!-- Aerodynamic constants. -->
  <property value="20.29"> aero/constants/length-ft </property>
  <property value="20.29"> aero/constants/diameter-ft </property>
  <property value="823.37"> aero/constants/length-diameter-ft2 </property>
  <property value="35000.00"> aero/constants/volume-ft3 </property>
  <property value="1069.99"> aero/constants/volume-ft3_2_3 </property>

  <!-- Added mass constants. -->
  <property value="-0.50"> aero/constants/added-mass/k-axial </property>
  <property value="-0.50"> aero/constants/added-mass/k-traverse </property>
  <property value="-0.00"> aero/constants/added-mass/k-rotational </property>
  <property value="1.00"> aero/constants/added-mass/tweak-factor </property>

 </system>

 <system file="airship_added_mass"/>

 <aerodynamics>
  <!-- Wild guess: D = K A q_inf -->
  <!-- A = cross sectional area (120.2m^2); -->
  <!--
      NOTE: The drag coefficients has been estimated using a virtual
            wind-tunnel setup in gerris, a fluid dynamics simulator.
            The viability of this approach is not yet evaluated.
  -->
  <axis name="DRAG">
   <function name="aero/coefficient/CDh">
    <description>Drag</description>
    <product>
     <property>aero/qbar-psf</property>
     <value> 1293.6 </value>
     <table>
      <independentVar lookup="row">aero/alpha-deg</independentVar>
      <tableData>
       -135 0.033088
       -90  0.024652
       -45  0.033088
       0    0.020219
       45   0.067882
       135  0.067882
      </tableData>
     </table>
    </product>
   </function>
  </axis>

  <axis name="ROLL">
   <function name="aero/coefficient/Clp">
    <description>Roll_moment_due_to_roll_rate_(roll_damping)</description>
    <!-- Wild guess: K * basket area * moment arm * "p_inf" -->
    <!-- The current version is just a hack to make the balloon stable. -->
    <product>
     <value> -5.0 </value>
     <value> 14.1 </value>
     <value> 47.0 </value>
     <!--property>aero/bi2vel</property-->
     <property>velocities/p-aero-rad_sec</property>
    </product>
   </function>
  </axis>

  <axis name="PITCH">
   <function name="aero/coefficient/Cmq">
    <description>Pitch_moment_due_to_pitch_rate_(damping)</description>
    <!-- Wild guess: K * basket area * moment arm * "p_inf" -->
    <!-- The current version is just a hack to make the balloon stable. -->
    <product>
     <value> -5.0 </value>
     <value> 14.1 </value>
     <value> 47.0 </value>
     <!--property>aero/ci2vel</property-->
     <property>velocities/q-aero-rad_sec</property>
    </product>
   </function>
  </axis>

 </aerodynamics>

<!--
 <output name="datalog.csv" type="CSV" rate="1">
  <rates> ON </rates>
  <velocities> ON </velocities>
  <forces> ON </forces>
  <moments> ON </moments>
  <position> ON </position>
  <fcs> ON </fcs>
  <propulsion> OFF </propulsion>
  <aerosurfaces> ON </aerosurfaces>
  <fcs> ON </fcs>
  <ground_reactions> ON </ground_reactions>

  <property> buoyant_forces/gas-cell/valve_open </property>
  <property> inertia/pointmass-weight-lbs </property>
  <property> atmosphere/T-R </property>
  <property> buoyant_forces/gas-cell/max_volume-ft3 </property>
  <property> buoyant_forces/gas-cell/temp-R </property>
  <property> buoyant_forces/gas-cell/pressure-psf </property>
  <property> buoyant_forces/gas-cell/volume-ft3 </property>
  <property> buoyant_forces/gas-cell/buoyancy-lbs </property>
  <property> buoyant_forces/gas-cell/contents-mol </property>
  <property> buoyant_forces/gas-cell/valve_open </property>

 </output>
-->
</fdm_config>
